<?xml version="1.0"?>
<?xml-stylesheet href="http://jsbsim.sourceforge.net/JSBSim.xsl" type="text/xsl"?>
<fdm_config name="F-8E_Crusader" version="2.0" release="BETA"
 xmlns:xsi="http://www.w3.org/2001/XMLSchema-instance"
 xsi:noNamespaceSchemaLocation="http://jsbsim.sourceforge.net/JSBSim.xsd">


    <fileheader>
        <author>Gérard Robin, aeromatic based </author>
        <filecreationdate> 24-09-2008 </filecreationdate>
        <version> Version 1.0</version>
        <description> Models a F-8E_Crusader </description>
	<documentation>

		http://aeronavale.free.fr/avion_crusader.htm
		*********************************************************************
		Vought F-8E (FN) Crusader : Caractéristiques principales
		Constructeur     Ling-Temco-Vought
		Mission     Interception tout temps
		Envergure     10.72 m
		Longueur     16.61 m
		Hauteur     4.80 m
		Surface alaire     34.84 m2
		Poids max 	    13 000 kg
		Moteur     1 réacteur J 57 P 20 A Pratt et Whitney
		Vitesse max    Mach 1.8
		Vitesse de croisière     860 km/h
		Vitesse d'appontage     180 km/h
		Plafond     50.000 pieds
		Distance franchissable     1 500 nautiques
		Autonomie     2 h 30
		********************************************************************************
		http://www.vought.com/heritage/products/html/f8u-2spec.html

		Data below for F-8C
		Dimensions
		Wingspan    35.17 ft
		Overall Langth    55.25 ft
		Height    15.75 ft
		Weights and Capacities
		Empty Weight    18950 lb
		Fuel Capacity    1348 gal

		Powerplant Characteristics
		Type:  Pratt  Whitney J57-P16
		Rating Thrust    10700 lb
		Rating Thrust with afterburner
		16900 lb

		Performance
		Maximum Speed, Sea Level
		1105 mph

		**********************************************************************
		http://www.aerospaceweb.org/aircraft/fighter/f8/

		Data below for F-8P
		Last modified 14 November 2004
		HISTORY:
		First Flight 	(XF-8U-1) 25 March 1955
		(F-8A) 20 September 1955
		Service Entry 	March 1957
		Retirement 	4 December 1999
		AIRFOIL SECTIONS:
		Wing Root 	NACA 65A006 mod
		Wing Tip 	NACA 65A005 mod
		DIMENSIONS:
		Length 	54.50 ft (16.61 m)
		Wingspan 	35.17 ft (10.72 m)
		Height 	15.75 ft (4.80 m)
		Wing Area 	374 ft2 (34.84 m2)
		WEIGHTS:
		Empty 	19,700 lb (8,935 kg)
		Typical Load 	27,560 lb (12,500 kg)
		Max Takeoff 	34,000 lb (15,420 kg)
		Fuel Capacity 	internal: 5,300 L
		PROPULSION:
		Powerplant 	one Pratt  Whitney J57-P-20A afterburning turbojet
		Thrust 	18,000 lb (80.07 kN)
		PERFORMANCE:
		Max Level Speed 	at altitude: 1,225 mph (1,975 km/h) at 40,000 ft (12,190 m), Mach 1.86
		at sea level: unknown
		Initial Climb Rate 	21,000 ft (6,410 m) / min
		Service Ceiling 	unknown
		Range 	typical: 380 nm (710 km)
		ferry: 1,040 nm (1,930 km)
		g-Limits 	unknown
		ARMAMENT:
		Gun 	four 20-mm Colt cannons (84 to 144 rds ea)
		Stations 	four external hardpoints
		Air-to-Air Missile 	R.530, Matra 550 Magic, AIM-9 Sidewinder
		*************************************************************************************************************************
		The F-8A entered service in March of 1957.
		Length: 				55' 3"
		Height:				15' 9"
		Wingspan (spread)		35' 8"
		Wing area:				375 sq. ft.
		NACA 65A006 mod

			F-8E
		Empty Wt:					        	19,200
		Max Launch Wt:					34,100
		Max Trap Wt:						22,000
		Approach speed @max:				140 kts
		Stall, pwr. on/off					123/145 kts
		JP-5, internal-gal/lb:					1,348/9,100
		Engine: PW J-57-P....				16
		Thrust, MRT/CRT, #:				10,700/18,000
		Guns:								4-20mm, 500 rds
		Missiles:							4 Sidewinder
		Max Speed, IMN/mph**:				1.9/1,255
		Combat Radius, nm:				355
		Service Ceiling, MRT				40,000'

		*************************************************************************

		from http://en.wikipedia.org/wiki/F-8_Crusader
		# Dry thrust: 10,700 lbf (47.6 kN)
		# Thrust with afterburner: 18,000 lbf (80.1 kN)
		Airfoil: NACA 65A006 mod root, NACA 65A005 mod tip
		Zero-lift drag coefficient: 0.0133
		# Drag area: 5.0 ft² (0.46 m²)
		# Aspect ratio: 3.42

		**************************************************************************

		File:     f8e.xml

			Author:   Aero-Matic v 8
			Adons from Gerard ROBIN     07-10-2005   (jj mm aa)
			was, with carrier landing patch (from Mathias Froëhlich)
                        Revisited according to JSBSIm V.2.0 with new feature External Reaction.
                        Wants a specific Deck Carrier Description
                        The FlightGear catapult  info does not
                        pass through to the JSBSim FDM.
                        A Nasal script calculate in RT the right position of each catapult on the Carrier.

		Inputs:
		name:          Vought F-8E Crusader
		type:          single-engine transonic/supersonic fighter
		max weight:    34100 lb
		wing span:     35.17232 ft
		length:        54.49741 ft
		wing area:     375.0526 sq-ft
		gear type:     tricycle
		retractable?:  yes
		# engines:     1
		engine type:   turbine
		engine layout: aft fuselage
		yaw damper?    yes
		Outputs:
		wing loading:  90.92 lb/sq-ft
		CL-alpha:      3.5 per radian
		CL-0:          0.08
		CL-max:        1
		CD-0:          0.021
			K:             0.09
		******************************************************************************
		quelques documents qui donnent des courbes19930087197_1993087197-naca65A006.pdf
		et 19930087933_1993087933-naca65A006.pdf
	</documentation>
    </fileheader>

    <metrics>
        <wingarea unit="FT2"> 375.05 </wingarea>
        <wingspan unit="FT"> 35.17 </wingspan>
        <wing_incidence unit="DEG">0.0</wing_incidence>
        <chord unit="FT"> 14.76 </chord>
        <htailarea unit="FT2"> 57 </htailarea>
        <htailarm unit="FT"> 20.8 </htailarm>
        <vtailarea unit="FT2"> 75 </vtailarea>
        <vtailarm unit="FT"> 20.4 </vtailarm>
        <location name="AERORP" unit="IN">
            <x> 46 </x>
            <y> 0 </y>
            <z> 21.26 </z>
        </location>
        <location name="EYEPOINT" unit="IN">
            <x> 130.8 </x>
            <y> 0 </y>
            <z> 36 </z>
        </location>
        <location name="VRP" unit="IN">
            <x> 0 </x>
            <y> 0 </y>
            <z> 0 </z>
        </location>
    </metrics>

    <mass_balance>
        <ixx unit="SLUG*FT2"> 23803 </ixx>
        <iyy unit="SLUG*FT2"> 96049 </iyy>
        <izz unit="SLUG*FT2"> 84902 </izz>
        <ixy unit="SLUG*FT2"> 0 </ixy>
        <ixz unit="SLUG*FT2"> 0 </ixz>
        <iyz unit="SLUG*FT2"> 0 </iyz>
        <emptywt unit="LBS"> 19700 </emptywt>
        <location name="CG" unit="IN">
            <x> 46 </x>
            <y> 0 </y>
            <z> 0 </z>
        </location>
    </mass_balance>

    <ground_reactions>
        <contact type="BOGEY" name="NOSE_LG">  <!--0-->
            <location unit="IN">
                <x> -139.76 </x>
                <y> 0 </y>
                <z> -81.6 </z>
            </location>
            <static_friction> 0.8 </static_friction>
            <dynamic_friction> 0.5 </dynamic_friction>
            <rolling_friction> 0.02 </rolling_friction>
            <spring_coeff unit="LBS/FT"> 18000 </spring_coeff>
            <damping_coeff unit="LBS/FT/SEC"> 4500 </damping_coeff>
            <max_steer unit="DEG"> 5 </max_steer>
            <brake_group> NONE </brake_group>
            <retractable>1</retractable>
        </contact>
        <contact type="BOGEY" name="LEFT_MLG"> <!--1-->
            <location unit="IN">
                <x> 82.44 </x>
                <y> -58.03 </y>
                <z> -65.75 </z>
            </location>
            <static_friction> 0.8 </static_friction>
            <dynamic_friction> 0.5 </dynamic_friction>
            <rolling_friction> 0.02 </rolling_friction>
            <spring_coeff unit="LBS/FT"> 39100 </spring_coeff>
            <damping_coeff unit="LBS/FT/SEC"> 7820 </damping_coeff>
            <max_steer unit="DEG"> 0.0 </max_steer>
            <brake_group> LEFT </brake_group>
            <retractable>1</retractable>
        </contact>
        <contact type="BOGEY" name="RIGHT_MLG"> <!--2-->
            <location unit="IN">
                <x> 82.44 </x>
                <y> 58.03 </y>
                <z> -65.75 </z>
            </location>
            <static_friction> 0.8 </static_friction>
            <dynamic_friction> 0.5 </dynamic_friction>
            <rolling_friction> 0.02 </rolling_friction>
            <spring_coeff unit="LBS/FT"> 39100 </spring_coeff>
            <damping_coeff unit="LBS/FT/SEC"> 7820 </damping_coeff>
            <max_steer unit="DEG"> 0.0 </max_steer>
            <brake_group> RIGHT </brake_group>
            <retractable>1</retractable>
        </contact>
        <contact type="BOGEY" name="W_LEFT_FOLD"> <!--3-->
            <location unit="IN">
                <x> 171 </x>
                <y> -213 </y>
                <z> 7.5 </z>
            </location>
            <static_friction> 0.2 </static_friction>
            <dynamic_friction> 0.2 </dynamic_friction>
            <rolling_friction> 0.2 </rolling_friction>
            <spring_coeff unit="LBS/FT"> 10000 </spring_coeff>
            <damping_coeff unit="LBS/FT/SEC"> 200 </damping_coeff>
            <max_steer unit="DEG"> 0.0 </max_steer>
            <brake_group> NONE </brake_group>
            <retractable>1</retractable>
        </contact>
        <contact type="BOGEY" name="W_RIGHT_FOLD"><!-- 4-->
            <location unit="IN">
                <x> 171 </x>
                <y> 213 </y>
                <z> 7.5 </z>
            </location>
            <static_friction> 0.2 </static_friction>
            <dynamic_friction> 0.2 </dynamic_friction>
            <rolling_friction> 0.2 </rolling_friction>
            <spring_coeff unit="LBS/FT"> 10000 </spring_coeff>
            <damping_coeff unit="LBS/FT/SEC"> 200 </damping_coeff>
            <max_steer unit="DEG"> 0.0 </max_steer>
            <brake_group> NONE </brake_group>
            <retractable>1</retractable>
        </contact>
        <contact type="BOGEY" name="W_LEFT"> <!--5-->
            <location unit="IN">
                <x> 113</x>
                <y> -135.3 </y>
                <z> 15.76 </z>
            </location>
            <static_friction> 0.2 </static_friction>
            <dynamic_friction> 0.2 </dynamic_friction>
            <rolling_friction> 0.2 </rolling_friction>
            <spring_coeff unit="LBS/FT"> 10000 </spring_coeff>
            <damping_coeff unit="LBS/FT/SEC"> 200 </damping_coeff>
            <max_steer unit="DEG"> 0.0 </max_steer>
            <brake_group> NONE </brake_group>
            <retractable>0</retractable>
        </contact>
        <contact type="BOGEY" name="W_RIGHT"> <!--6-->
            <location unit="IN">
                <x> 113 </x>
                <y> 135.3 </y>
                <z> 15.76</z>
            </location>
            <static_friction> 0.2 </static_friction>
            <dynamic_friction> 0.2 </dynamic_friction>
            <rolling_friction> 0.2 </rolling_friction>
            <spring_coeff unit="LBS/FT"> 10000 </spring_coeff>
            <damping_coeff unit="LBS/FT/SEC"> 200 </damping_coeff>
            <max_steer unit="DEG"> 0.0 </max_steer>
            <brake_group> NONE </brake_group>
            <retractable>0</retractable>
        </contact>
        <contact type="BOGEY" name="VT"> <!--7-->
            <location unit="IN">
                <x> 312 </x>
                <y> 0 </y>
                <z> 14.5 </z>
            </location>
            <static_friction> 0.2 </static_friction>
            <dynamic_friction> 0.2 </dynamic_friction>
            <rolling_friction> 0.2 </rolling_friction>
            <spring_coeff unit="LBS/FT"> 10000 </spring_coeff>
            <damping_coeff unit="LBS/FT/SEC"> 200 </damping_coeff>
            <max_steer unit="DEG"> 0.0 </max_steer>
            <brake_group> NONE </brake_group>
            <retractable>0</retractable>
        </contact>
        <contact type="BOGEY" name="RADOME"> <!--8-->
            <location unit="IN">
                <x> -172 </x>
                <y> 0 </y>
                <z> 39.5 </z>
            </location>
            <static_friction> 0.2 </static_friction>
            <dynamic_friction> 0.2 </dynamic_friction>
            <rolling_friction> 0.2 </rolling_friction>
            <spring_coeff unit="LBS/FT"> 100 </spring_coeff>
            <damping_coeff unit="LBS/FT/SEC"> 20000 </damping_coeff>
            <max_steer unit="DEG"> 0.0 </max_steer>
            <brake_group> NONE </brake_group>
            <retractable>1</retractable>
        </contact>
        <contact type="BOGEY" name="BELLY"> <!--9-->
            <location unit="IN">
                <x> -173 </x>
                <y> 0 </y>
                <z> -39.3 </z>
            </location>
            <static_friction> 0.2 </static_friction>
            <dynamic_friction> 0.2 </dynamic_friction>
            <rolling_friction> 0.2 </rolling_friction>
            <spring_coeff unit="LBS/FT"> 100000 </spring_coeff>
            <damping_coeff unit="LBS/FT/SEC"> 3000 </damping_coeff>
            <max_steer unit="DEG"> 0.0 </max_steer>
            <brake_group> NONE </brake_group>
            <retractable>1</retractable>
        </contact>
        <contact type="BOGEY" name="NOSE"> <!--10-->
            <location unit="IN">
                <x> -317 </x>
                <y> 0 </y>
                <z> -10 </z>
            </location>
            <static_friction> 0.2 </static_friction>
            <dynamic_friction> 0.2 </dynamic_friction>
            <rolling_friction> 0.2 </rolling_friction>
            <spring_coeff unit="LBS/FT"> 100000 </spring_coeff>
            <damping_coeff unit="LBS/FT/SEC"> 2000</damping_coeff>
            <max_steer unit="DEG"> 0.0 </max_steer>
            <brake_group> NONE </brake_group>
            <retractable>1</retractable>
        </contact>
        <contact type="BOGEY" name="NOZZLE"> <!--11-->
            <location unit="IN">
                <x> 315 </x>
                <y> 0 </y>
                <z> -26 </z>
            </location>
            <static_friction> 0.2 </static_friction>
            <dynamic_friction> 0.2 </dynamic_friction>
            <rolling_friction> 0.2 </rolling_friction>
            <spring_coeff unit="LBS/FT"> 100000 </spring_coeff>
            <damping_coeff unit="LBS/FT/SEC"> 2000 </damping_coeff>
            <max_steer unit="DEG"> 0.0 </max_steer>
            <brake_group> NONE </brake_group>
            <retractable>1</retractable>
        </contact>
        <contact type="BOGEY" name="TOP"> <!--12-->
            <location unit="IN">
                <x> 0 </x>
                <y> 0 </y>
                <z> 60</z>
            </location>
            <static_friction> 0.2 </static_friction>
            <dynamic_friction> 0.2 </dynamic_friction>
            <rolling_friction> 0.2 </rolling_friction>
            <spring_coeff unit="LBS/FT"> 100000 </spring_coeff>
            <damping_coeff unit="LBS/FT/SEC"> 20000 </damping_coeff>
            <max_steer unit="DEG"> 0.0 </max_steer>
            <brake_group> NONE </brake_group>
            <retractable>1</retractable>
        </contact>
    </ground_reactions>
    <propulsion>
        <engine file="PW-J57P-new">
            <location unit="IN">
                <x> 317 </x>
                <y> 0 </y>
                <z> 0 </z>
            </location>
            <orient unit="DEG">
                <roll> 0.0 </roll>
                <pitch> 0 </pitch>
                <yaw> 0 </yaw>
            </orient>
            <feed>0</feed>
            <thruster file="direct-new">
                <location unit="IN">
                    <x> 317 </x>
                    <y> 0 </y>
                    <z> 0 </z>
                </location>
                <orient unit="DEG">
                    <roll> 0.0 </roll>
                    <pitch> 0.0 </pitch>
                    <yaw> 0.0 </yaw>
                </orient>
            </thruster>
        </engine>

        <tank type="FUEL">    <!-- Tank Main -->
            <location unit="IN">
                <x> 0 </x>
                <y> 0 </y>
                <z> -16.3492 </z>
            </location>
            <capacity unit="LBS"> 3488 </capacity>
            <contents unit="LBS"> 2900 </contents>
        </tank>
        <tank type="FUEL">    <!-- Tank Transfer -->
            <location unit="IN">
                <x> 0 </x>
                <y> 0 </y>
                <z> -16.3492 </z>
            </location>
            <capacity unit="LBS"> 5678 </capacity>
            <contents unit="LBS"> 2900 </contents>
        </tank>

    </propulsion>

    <system file="blackout"/>
    <system file="wings"/>
    <system file="BLC"/>
    <system file="propulsion"/>
    <system file="landing-gear"/>
    <system file="canopy"/>
    <system file="cat_external_data"/>
    <system file="launchbar"/>
    <system file="catapult"/>
    <system file="holdback"/>
    <system file="hook"/>
    <system file="mule"/>
    <system file="instruments"/>
    <system file="speedbrake"/>
    <system file="light-outdoor"/>
    <system file="electrical"/>
    <system file="sinking"/>
    <system file="crash"/>
    <system file="carrier_jbd"/>
    <system file="taxi"/>
    <system file="fuel"/>
    <system file="refuel"/>
    <system file="probe-refuel"/>
    <system file="annunciator"/>
    <system file="aoa"/>

    <flight_control name="FCS: F-8E">

        <property value="0">fcs/balance-wings-pos-norm</property>

        <channel name="Pitch">

            <summer name="Pitch Trim Sum">
                <input>fcs/elevator-cmd-norm</input>
                <input>fcs/balance-wings-pos-norm</input>
                <input>fcs/pitch-trim-cmd-norm</input>
                <clipto>
                    <min>-1</min>
                    <max>1</max>
                </clipto>
            </summer>

            <aerosurface_scale name="Elevator Control">
                <input>fcs/pitch-trim-sum</input>
                <range>
                    <min>-0.35</min>
                    <max>0.3</max>
                </range>
                <output>fcs/elevator-pos-rad</output>
            </aerosurface_scale>

            <pure_gain name="Elevator Surface">
                <input>fcs/pitch-trim-sum</input>
                <gain>1</gain>
                <output>fcs/elevator-pos-norm</output>
            </pure_gain>
        </channel>

        <channel name="Roll">
            <summer name="Roll Trim Sum">
                <input>fcs/aileron-cmd-norm</input>
                <input>fcs/roll-trim-cmd-norm</input>
                <clipto>
                    <min>-1</min>
                    <max>1</max>
                </clipto>
            </summer>

            <aerosurface_scale name="Left Aileron Control">
                <input>fcs/roll-trim-sum</input>
                <range>
                    <min>-0.35</min>
                    <max>0.35</max>
                </range>
                <output>fcs/left-aileron-pos-rad</output>
            </aerosurface_scale>

            <aerosurface_scale name="Right Aileron Control">
                <input>fcs/roll-trim-sum</input>
                <range>
                    <min>-0.35</min>
                    <max>0.35</max>
                </range>
                <output>fcs/right-aileron-pos-rad</output>
            </aerosurface_scale>
        </channel>

        <channel name="Yaw">
            <scheduled_gain name="Yaw Damper Rate">
                <input>velocities/r-aero-rad_sec</input>
                <table>
                    <independentVar>aero/qbar-psf</independentVar>
                    <tableData>
                        3.0000	0.0000
                        11.0000	2.0000
                    </tableData>
                </table>
            </scheduled_gain>

            <scheduled_gain name="Yaw Damper Beta">
                <input>aero/beta-rad</input>
                <table>
                    <independentVar>aero/qbar-psf</independentVar>
                    <tableData>
                        3.0000	0.0000
                        11.0000	0.0000
                    </tableData>
                </table>
            </scheduled_gain>

            <summer name="Yaw Damper Sum">
                <input>fcs/yaw-damper-beta</input>
                <input>fcs/yaw-damper-rate</input>
                <clipto>
                    <min>-0.2000</min>
                    <max>0.2000</max>
                </clipto>
            </summer>

            <scheduled_gain name="Yaw Damper Final">
                <input>fcs/yaw-damper-sum</input>
                <table>
                    <independentVar>aero/qbar-psf</independentVar>
                    <tableData>
                        2.9900	0.0000
                        3.0000	1.0000
                    </tableData>
                </table>
            </scheduled_gain>

             <summer name="Rudder Command Sum">
                <input>fcs/rudder-cmd-norm</input>
                <input>fcs/yaw-trim-cmd-norm</input>
                <clipto>
                    <min>-1</min>
                    <max>1</max>
                </clipto>
            </summer>

            <summer name="Rudder Sum">
                <input>fcs/rudder-command-sum</input>
                <input>fcs/yaw-damper-final</input>
                <clipto>
                    <min>-1.0000</min>
                    <max>1.0000</max>
                </clipto>
            </summer>

            <aerosurface_scale name="Rudder Control">
                <input>fcs/rudder-sum</input>
                <range>
                    <min>-0.3500</min>
                    <max>0.3500</max>
                </range>
                <output>fcs/rudder-pos-rad</output>
            </aerosurface_scale>

            <pure_gain name="Rudder Surface">
                <input>fcs/rudder-sum</input>
                <gain>1</gain>
                <output>fcs/rudder-pos-norm</output>
            </pure_gain>
        </channel>


    </flight_control>

    <aerodynamics>
        <!--Variable incidence wings,   the max incidence 7 deg  0.12217305 rad    -->
        <!--FIXME french version Variable incidence wings,   the max incidence 8 deg  0.13962634 rad    -->
        <function name="aero/alpha-rad-w-incidence">
            <description>Addition of incidence due to UP</description>
            <product>
                <sum>
                    <property>aero/alpha-rad</property>
                    <table>
                        <independentVar>fcs/wing-incidence-up</independentVar>
                        <tableData>
                            0.0 0.0
                            1.0 0.13962634
                        </tableData>
                    </table>
                </sum>
            </product>
        </function>


       <!-- Here from A-7E by Dave-->
        <function name="aero/function/kCDge">
            <description>Change_in_drag_due_to_ground_effect</description>
            <product>
                <table>
                    <independentVar>aero/h_b-mac-ft</independentVar>
                    <tableData>
                        0.0000	0.0480
                        0.1000	0.5150
                        0.1500	0.6290
                        0.2000	0.7090
                        0.3000	0.8150
                        0.4000	0.8820
                        0.5000	0.9280
                        0.6000	0.9620
                        0.7000	0.9880
                        0.8000	1.0000
                    </tableData>
                </table>
            </product>
        </function>

        <function name="aero/function/kCLge">
            <description>Change_in_lift_due_to_ground_effect</description>
            <product>
                <table>
                    <independentVar>aero/h_b-mac-ft</independentVar>
                    <tableData>
                        0.0000	1.2030
                        0.1000	1.1270
                        0.1500	1.0900
                        0.2000	1.0730
                        0.3000	1.0460
                        0.4000	1.0550
                        0.5000	1.0190
                        0.6000	1.0130
                        0.7000	1.0080
                        0.8000	1.0060
                        0.9000	1.0030
                        1.0000	1.0020
                        1.1000	1.0000
                    </tableData>
                </table>
            </product>
        </function>

        <!--CL-alpha:      3.5 per radian
                           CL-0:          0.08
                           CL-max:        1
                           CD-0:          0.021    must be checked with data tunnel
			K:             0.09-->

        <!--document 19930085859_1993085859.pdf with SviTEPT RACK 35O, ASPECT RATIO 4, TAPER RATIO 0.8,
        AND NACA 65A006 AIRFOIL SECTION.-->
        <!--Zero-lift drag coefficient: 0.0133-->
       <!--we temporary use the drag values aprox from the wing without fuselage -->
        <axis name="DRAG">
            <function name="aero/coefficient/CD0">
                <description>Drag_at_zero_lift</description>
                <product>
                    <property>aero/qbar-psf</property>
                    <property>metrics/Sw-sqft</property>
                    <property>aero/function/kCDge</property>
                      <table>
                          <independentVar lookup="row">aero/alpha-rad-w-incidence</independentVar>
                          <tableData>
                              -1.5700	1.5000
                              -0.2600	0.026
                              0.0000	0.012
                              0.2600	0.026
                              1.5700	1.5000
                          </tableData>
                      </table>
                </product>
            </function>
            <function name="aero/coefficient/CDi">
                <description>Induced_drag</description>
                <product>
                    <property>aero/qbar-psf</property>
                    <property>metrics/Sw-sqft</property>
                    <property>aero/cl-squared</property>
                    <value>0.0700</value>
                </product>
            </function>
            <function name="aero/coefficient/CDmach">
                <description>Drag_due_to_mach</description>
                <product>
                    <property>aero/qbar-psf</property>
                    <property>metrics/Sw-sqft</property>
                      <table>
                          <independentVar>velocities/mach</independentVar>
                          <tableData>
                              0.00      0.000
                              0.79      0.000
                              1.1       0.020
                              1.15      0.012
                              1.3       0.014
                              1.8       0.017
                          </tableData>
                      </table>
                </product>
            </function>
            <!--<function name="aero/coefficient/CDwing">
                <description>Drag_due_to_wings_incidence</description>
                <product>
                    <property>aero/qbar-psf</property>
                    <property>metrics/Sw-sqft</property>
                      <table>
                          <independentVar>fcs/wings-pos-rad</independentVar>
                          <tableData>
                              0.0000	0.0000
                              0.1222	0.0302
                          </tableData>
                      </table>
                </product>
            </function>-->
            <function name="aero/coefficient/CDDlef">
                <description>Drag_due_to_leading_edge_flap_deflection</description>
                <product>
                    <property>aero/qbar-psf</property>
                    <property>metrics/Sw-sqft</property>
                    <property>fcs/leflaps-control</property>
                    <value>0.0100</value>
                </product>
            </function>
            <function name="aero/coefficient/CDflap">
                <description>Drag_due_to_flaps</description>
                <product>
                    <property>aero/qbar-psf</property>
                    <property>metrics/Sw-sqft</property>
                    <property>fcs/flap-pos-norm</property>
                    <value>0.0100</value>
                </product>
            </function>
            <function name="aero/coefficient/CDgear">
                <description>Drag_due_to_gear</description>
                <product>
                    <property>aero/qbar-psf</property>
                    <property>metrics/Sw-sqft</property>
                    <property>gear/unit[0]/pos-norm</property>
                    <property>gear/unit[1]/pos-norm</property>
                    <property>gear/unit[2]/pos-norm</property>
                    <value>0.0200</value>
                </product>
            </function>
            <function name="aero/coefficient/CDsb">
                <description>Drag_due_to_speedbrakes</description>
                <product>
                    <property>aero/qbar-psf</property>
                    <property>metrics/Sw-sqft</property>
                    <property>fcs/speedbrake-pos-deg</property>
                    <value>0.0005</value>
                </product>
            </function>
            <function name="aero/coefficient/CDbeta">
                <description>Drag_due_to_sideslip</description>
                <product>
                    <property>aero/qbar-psf</property>
                    <property>metrics/Sw-sqft</property>
                      <table>
                          <independentVar>aero/beta-rad</independentVar>
                          <tableData>
                              -1.5700	1.2300
                              -0.2600	0.0500
                              0.0000	0.0000
                              0.2600	0.0500
                              1.5700	1.2300
                          </tableData>
                      </table>
                </product>
            </function>
            <function name="aero/coefficient/CDde">
                <description>Drag_due_to_Elevator_Deflection</description>
                <product>
                    <property>aero/qbar-psf</property>
                    <property>metrics/Sw-sqft</property>
                    <abs><property>fcs/elevator-pos-norm</property></abs>
                    <value>0.0400</value>
                </product>
            </function>

            <!--not realistic , only for animation with crash in water -->
            <function name="aero/coefficient/CDgear_water">
                <description>Drag_due_to_crashing_with_gear_in_water</description>
                <product>
                    <property>fcs/drag-gear-in-water-switch</property>
                    <table>
                        <independentVar>velocities/vc-kts</independentVar>
                        <tableData>
                            0     0
                            30    900
                            50    2700
                            90    10000
                            110  100000
                            220  10000000
                        </tableData>
                    </table>
                </product>
            </function>
        </axis>

        <axis name="SIDE">
            <function name="aero/coefficient/CYb">
                <description>Side_force_due_to_beta</description>
                <product>


                    <property>aero/qbar-psf</property>
                    <property>metrics/Sw-sqft</property>
                    <property>aero/beta-rad</property>
                    <value>-1.0000</value>
                </product>
            </function>
        </axis>

        <!--CL-alpha:      3.5 per radian
                           CL-0:          0.08
                           CL-max:        1
                           CD-0:          0.021  must be checked with data tunnel
			K:             0.09-->
        <!--here from NACA RM No L9B25  curve CL  angle of attack-->
        <axis name="LIFT">
            <function name="aero/coefficient/CLalpha">
                <description>Lift_due_to_alpha</description>
                <product>
                    <property>aero/qbar-psf</property>
                    <property>metrics/Sw-sqft</property>
                    <property>aero/function/kCLge</property>
                      <table>
                          <independentVar lookup="row">aero/alpha-rad-w-incidence</independentVar>
                          <tableData>
                              -0.2000	-0.6200
                              -0.03490   -0.15
                              0.0000	0.08
                              0.03490     0.15
                              0.0698       0.28
                              0.10472     0.39
                              0.139626   0.5
                              0.174533   0.59
                              0.2200	0.8500
                              0.2900	1.0000
                              0.6000	0.4480
                          </tableData>
                      </table>
                </product>
            </function>
           <!-- <function name="aero/coefficient/dCLwing">
                <description>Delta_Lift_due_to_variable_incidence_wings</description>
                <product>
                    <property>aero/qbar-psf</property>
                    <property>metrics/Sw-sqft</property>
                      <table>
                          <independentVar>fcs/wings-pos-rad</independentVar>
                          <tableData>
                              0.0000	0.0000
                              0.1222	0.4800
                          </tableData>
                      </table>
                </product>
            </function>-->
            <function name="aero/coefficient/dCLDlef">
                <description>Delta_Lift_due_to_leading_edge_flap_deflection</description>
                <product>
                    <property>aero/qbar-psf</property>
                    <property>metrics/Sw-sqft</property>
                      <table>
                          <independentVar>fcs/leflap-pos-rad</independentVar>
                          <tableData>
                              0.0000	0.0000
                              0.1200	0.0080
                              0.2400	0.0160
                              0.3300	0.0240
                              0.4300	0.0300
                          </tableData>
                      </table>
                </product>
            </function>

            <!--only UP or DOWN  of  Flaps  synchro with Wing incidence  Flap => 32 degres + wing => 8 deg  = 40-->
            <!--only a guess  according to doc NACA RM L53J29 ===we want lft coef=1   at wing 8 deg ======= we have it ==>> 0.5 wings + 0.5 flap -->
            <function name="aero/coefficient/dCLflap">
                <description>Delta_Lift_due_to_flaps</description>
                <product>
                    <property>aero/qbar-psf</property>
                    <property>metrics/Sw-sqft</property>
                    <property>fcs/flap-pos-norm</property>
                    <value>0.50</value>
                </product>
            </function>
            <function name="aero/coefficient/dCLBLC">
            <description>Delta_Lift_due_to_BLC</description>
            <product>
                <property>aero/qbar-psf</property>
                    <property>metrics/Sw-sqft</property>
                    <property>systems/BLC/active</property>
                    <property>fcs/flap-pos-norm</property>
                    <value> 0.20 </value>
            </product>
            </function>
            <function name="aero/coefficient/dCLsb">
                <description>Delta_Lift_due_to_speedbrake</description>
                <product>
                    <property>aero/qbar-psf</property>
                    <property>metrics/Sw-sqft</property>
                    <property>fcs/speedbrake-pos-deg</property>
                    <value>0.0008</value>
                </product>
            </function>
            <function name="aero/coefficient/dCLwf">
                <description>Delta_Lift_due_to_wing_fold</description>
                <product>
                    <property>aero/qbar-psf</property>
                    <property>metrics/Sw-sqft</property>
                    <property>fcs/wing-fold-pos-norm</property>
                    <value>-0.3000</value>
                </product>
            </function>
            <function name="aero/coefficient/CLde">
                <description>Lift_due_to_Elevator_Deflection</description>
                <product>
                    <property>aero/qbar-psf</property>
                    <property>metrics/Sw-sqft</property>
                    <property>fcs/elevator-pos-rad</property>
                    <value>0.2200</value>
                </product>
            </function>
        </axis>

        <axis name="ROLL">
            <function name="aero/coefficient/Clb">
                <description>Roll_moment_due_to_beta</description>
                <product>
                    <property>aero/qbar-psf</property>
                    <property>metrics/Sw-sqft</property>
                    <property>metrics/bw-ft</property>
                    <property>aero/beta-rad</property>
                    <value>-0.1000</value>
                </product>
            </function>
            <function name="aero/coefficient/Clp">
                <description>Roll_moment_due_to_roll_rate</description>
                <product>
                    <property>aero/qbar-psf</property>
                    <property>metrics/Sw-sqft</property>
                    <property>metrics/bw-ft</property>
                    <property>aero/bi2vel</property>
                    <property>velocities/p-aero-rad_sec</property>
                    <value>-0.4000</value>
                </product>
            </function>
            <function name="aero/coefficient/Clr">
                <description>Roll_moment_due_to_yaw_rate</description>
                <product>
                    <property>aero/qbar-psf</property>
                    <property>metrics/Sw-sqft</property>
                    <property>metrics/bw-ft</property>
                    <property>aero/bi2vel</property>
                    <property>velocities/r-aero-rad_sec</property>
                    <value>0.1500</value>
                </product>
            </function>
            <function name="aero/coefficient/Clda">
                <description>Roll_moment_due_to_aileron</description>
                <product>
                    <property>aero/qbar-psf</property>
                    <property>metrics/Sw-sqft</property>
                    <property>metrics/bw-ft</property>
                    <property>fcs/left-aileron-pos-rad</property>
                      <table>
                          <independentVar>velocities/mach</independentVar>
                          <tableData>
                              0.0000	0.1100
                              2.0000	0.0370
                          </tableData>
                      </table>
                </product>
            </function>
            <function name="aero/coefficient/Cldr">
                <description>Roll_moment_due_to_rudder</description>
                <product>
                    <property>aero/qbar-psf</property>
                    <property>metrics/Sw-sqft</property>
                    <property>metrics/bw-ft</property>
                    <property>fcs/rudder-pos-rad</property>
                    <value>0.0100</value>
                </product>
            </function>
        </axis>

        <axis name="PITCH">
            <!--<function name="aero/coefficient/Cmwincd">
                <description>Pitch_moment_due_to_wings_incidence</description>
                <product>
                    <property>aero/qbar-psf</property>
                    <property>metrics/Sw-sqft</property>
                    <property>metrics/cbarw-ft</property>
                    <property>fcs/wings-pos-rad</property>
                    <value>0.1000</value>
                </product>
            </function>-->
            <function name="aero/coefficient/Cmalpha">
                <description>Pitch_moment_due_to_alpha</description>
                <product>
                    <property>aero/qbar-psf</property>
                    <property>metrics/Sw-sqft</property>
                    <property>metrics/cbarw-ft</property>
                    <property>aero/alpha-rad-w-incidence</property>
                    <value>-0.3000</value>
                </product>
            </function>
            <function name="aero/coefficient/Cmde">
                <description>Pitch_moment_due_to_elevator</description>
                <product>
                    <property>aero/qbar-psf</property>
                    <property>metrics/Sw-sqft</property>
                    <property>metrics/cbarw-ft</property>
                    <property>fcs/elevator-pos-rad</property>
                      <table>
                          <independentVar>velocities/mach</independentVar>
                          <tableData>
                              0.0000	-0.8000
                              2.0000	-0.2000
                          </tableData>
                      </table>
                </product>
            </function>
            <function name="aero/coefficient/Cmq">
                <description>Pitch_moment_due_to_pitch_rate</description>
                <product>
                    <property>aero/qbar-psf</property>
                    <property>metrics/Sw-sqft</property>
                    <property>metrics/cbarw-ft</property>
                    <property>aero/ci2vel</property>
                    <property>velocities/q-aero-rad_sec</property>
                    <value>-18.0000</value>
                </product>
            </function>
            <function name="aero/coefficient/Cmadot">
                <description>Pitch_moment_due_to_alpha_rate</description>
                <product>
                    <property>aero/qbar-psf</property>
                    <property>metrics/Sw-sqft</property>
                    <property>metrics/cbarw-ft</property>
                    <property>aero/ci2vel</property>
                    <property>aero/alphadot-rad_sec</property>
                    <value>-9.0000</value>
                </product>
            </function>
        </axis>

        <axis name="YAW">
            <function name="aero/coefficient/Cnb">
                <description>Yaw_moment_due_to_beta</description>
                <product>
                    <property>aero/qbar-psf</property>
                    <property>metrics/Sw-sqft</property>
                    <property>metrics/bw-ft</property>
                    <property>aero/beta-rad</property>
                    <value>0.1200</value>
                </product>
            </function>
            <function name="aero/coefficient/Cnr">
                <description>Yaw_moment_due_to_yaw_rate</description>
                <product>
                    <property>aero/qbar-psf</property>
                    <property>metrics/Sw-sqft</property>
                    <property>metrics/bw-ft</property>
                    <property>aero/bi2vel</property>
                    <property>velocities/r-aero-rad_sec</property>
                    <value>-0.1500</value>
                </product>
            </function>
            <function name="aero/coefficient/Cndr">
                <description>Yaw_moment_due_to_rudder</description>
                <product>
                    <property>aero/qbar-psf</property>
                    <property>metrics/Sw-sqft</property>
                    <property>metrics/bw-ft</property>
                    <property>fcs/rudder-pos-rad</property>
                    <value>-0.1000</value>
                </product>
            </function>
            <function name="aero/coefficient/Cnda">
                <description>Adverse_yaw</description>
                <product>
                    <property>aero/qbar-psf</property>
                    <property>metrics/Sw-sqft</property>
                    <property>metrics/bw-ft</property>
                    <property>fcs/left-aileron-pos-rad</property>
                    <value>0.0000</value>
                </product>
            </function>
        </axis>
    </aerodynamics>

     <external_reactions>

        <force name="catapult" frame="LOCAL">
        <location unit="IN">
            <x>  -30 </x>
            <y>    0.0 </y>
            <z>  -39.0 </z>
        </location>
        <direction>
            <x>1</x>
            <y>0</y>
            <z>0.1</z>
        </direction>
        </force>

        <!--Catapult   side force when necessary to keep the right heading-->
        <force name="cat-hold-side" frame="BODY">
            <location unit="IN">
                <x>  -30.0 </x>
                <y>    0.0 </y>
                <z>  -39.0 </z>
            </location>
            <direction>
                <x>0</x>
                <y>1</y>
                <z>0.0 </z>
            </direction>
        </force>


        <force name="cat-hold" frame="BODY">
        <location unit="IN">
            <x>  -30 </x>
            <y>    0.0 </y>
            <z>  -39.0 </z>
        </location>
        <direction>
            <x>0</x>
            <y>0</y>
            <z>1 </z>
        </direction>
        </force>

        <force name="holdback" frame="LOCAL">
        <location unit="IN">
            <x> 211</x>
            <y>    0.0 </y>
            <z>  -39.0 </z>
        </location>
        <direction>
            <x>   -1.0 </x>
            <y>    0.0 </y>
            <z>    -0.15 </z>
        </direction>
        </force>

        <!--Holdback  side force will keep the heading of the aircraft-->
        <force name="hb-hold-side" frame="BODY">
            <location unit="IN">
                <x> 211 </x>
                <y>    0.0 </y>
                <z>  -39.0 </z>
            </location>

            <direction>
                <x>0</x>
                <y>1</y>
                <z>1</z>
            </direction>
        </force>


        <!-- keep in place sitting at the catapult lat lon coordinate -->
        <force name="tensionx" frame="LOCAL">
            <location unit="IN">
                <x>0</x>
                <y>    0.0 </y>
                <z> -65 </z>
            </location>
            <direction>
                <x>1</x>
                <y>0</y>
                <z>0</z>
            </direction>
        </force>

        <force name="tensiony" frame="LOCAL">
            <location unit="IN">
                <x>0</x>
                <y>    0.0 </y>
                <z> -65</z>
            </location>
            <direction>
                <x>0</x>
                <y>1</y>
                <z>0</z>
            </direction>
        </force>

        <force name="hook" frame="BODY">
        <location unit="IN">
            <x>  211 </x>
            <y>    0.0 </y>
            <z>  -31.0 </z>
        </location>
        <direction>
            <x>  -1  </x>
            <y>0</y>
            <z>   0.35</z>
        </direction>
        </force>

        <force name="mule" frame="BODY">
        <location unit="IN">
            <x>  -139 </x>
            <y>    0.0 </y>
            <z>  -71.0 </z>
        </location>
        <direction>
            <x>1</x>
            <y>0</y>
            <z>0</z>
        </direction>
        </force>

        <force name="taxi" frame="BODY">
            <location unit="IN">
                <x>  -139 </x>
                <y>    0.0 </y>
                <z>  -71.0 </z>
            </location>
            <direction>
                <x>1</x>
                <y>0</y>
                <z>0.3</z>
            </direction>
        </force>


 </external_reactions>

</fdm_config>
